table := sort(READEXCEL("..\Desktop\Book1.xlsx", "Sheet1!A1:A126")) = [
    120.991; 121.596; 128.429; 129.688; 130.834; 131.784; 133.143; 133.852; 135.888; 136.219
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]
table_max := max(table) = 180.482
table_min := min(table) = 120.991
R := table_max - table_min = 59.491
n := length(table) = 126
m := 15
Δ := R/m = 3.96607
j := 0 .. m
k := 0 .. m - 1
x[j, :] := table_min + Δ*(2*j - 1)/2
f := hist(x, table)
# [plot: f vs x]
# [plot: f vs x]
F[k, :] := sum(f[i, :], i = 1 .. k)
# [plot: F vs x]
# [plot: F/n vs x]
table_avg := mean(table) = 149.059
table_mid := median(table) = 150.216
s2 := n/(n - 1)*var(table) = 98.2885
σ := sqrt(s2) = 9.91406
μ3 := 1/n*sum((table[i, :] - table_avg)^3, i = 0 .. n - 1)
μ4 := 1/n*sum((table[i, :] - table_avg)^4, i = 0 .. n - 1)
E := μ4/s2^2 - 3 = [0.370014]
a := μ3/σ^3 = [-0.0835926]
