α := 0.05
p := 1 - α
N := 3
K(z) := if(z ≤ 0, 0, sum((-1)^k*exp(-2*k^2*z^2), k = -N .. N))
# [chart]
    X[1] := z
    Y[1] := K(z)
    X[2] := z
    Y[2] := p
T := READEXCEL(".\book2.xlsx", "Лист1!B1:M2")
tl := 12
i := 1 .. tl
n := sum(T[1, j], j = 0 .. tl - 1) = 16
M_x := 1/n*sum(T[0, j]*T[1, j], j = 0 .. tl - 1) = 940.456
D_x := 1/(n - 1)*sum(T[1, j]*(T[0, j] - M_x)^2, j = 0 .. tl - 1) = 632.811
