P := rpois(100, 3)
LnL(λ) := (-100*λ + sum(P[i], i = 0 .. 99)*ln(λ)) - ln(product(P[i]!, i = 0 .. 99))
# [chart]
    X[1] := λ
    Y[1] := LnL(λ)
n := 0 .. 99
λ(n) := 1/n*sum(P[i], i = 0 .. n)
λ(50) = 3.02
λ(99) = 2.79798
# [plot: λ(n), λ(50) vs n]
P := rexp(100, 2)
LnL(λ) := 100*ln(λ) - λ*sum(P[i], i = 0 .. 99)
# [chart]
    X[1] := λ
    Y[1] := LnL(λ)
n := 0 .. 99
λ(n) := n/sum(P[i], i = 0 .. n)
λ(10) = 1.62311
λ(50) = 2.00886
λ(99) = 2.03606
# [plot: λ(n), λ(50) vs n]
