α := 0.1
ξ := rnorm(100, 1, 2)
σ := 2
X_mean := mean(ξ) = 1.23941
X_right := qnorm(1 - α/2, 0, 1) = 1.64485
X_left := -X_right = -1.64485
φ := (X_mean - 1)/sqrt(σ^2/100) = 1.19704
X_right := qnorm(1 - α, 0, 1) = 1.28155
X_left := -X_right = -1.28155
